units           real
atom_style      charge

boundary        p p p

read_data       lmp.data

pair_style      mliap model mliappy hfo2_model_wrapped.pt descriptor mtp
pair_coeff       * * Hf O

kspace_style    pppm 1e-6
kspace_modify   order 6
kspace_modify   gewald 0.25

neighbor        0.3 bin
neigh_modify    delay 0 every 20 check no

fix             1 all nve

dump            1 all custom 1 lmp.lammpstrj id type q x y z fx fy fz
dump_modify     1 sort id

thermo          1

run             0
